////CONFIG///////////////////

#define STARTTIME=2018-01-30 00:00:00 EST
#define STOPTIME=2018-01-31 00:00:00 EST
#define RECORDTIME=2018-01-30 00:00:00 EST

#define TIMEZONE=EST+5EDT

#define LOCATION=BUR_VT //LA_CA //BUR_VT

#define COUNT=10
#define LOADS=on

#define MYSQL_AMI=off
#define SOLAR=off

#define VOLT_POWER_DUMP=off //FIX
